Tue Dec 17 18:10:55 PST 2013
;; 1. Based on: run101
;; 2. Description: PK model 1 cmt base WT-CL SEX-CL
;; x1. Author: coen
$PROBLEM    PK model 1 cmt base
$INPUT      ID TIME MDV EVID DV AMT SEX WT ETN
$DATA       acop.csv IGNORE=@
$SUBROUTINE ADVAN2 TRANS2
$PK

ET=1
IF(ETN.EQ.3) ET=1.3
KA = THETA(1)
CL = THETA(2)*(WT/70)**THETA(6)*( THETA(7)**SEX) *EXP(ETA(1))
V = THETA(3)*EXP(ETA(2))
SC=V

$ERROR

IPRED = F
IRES = DV-IPRED
W = IPRED*THETA(4) + THETA(5)
IF (W.EQ.0) W = 1
IWRES = IRES/W
Y= IPRED+W*ERR(1)

$THETA  (0,2) ; KA
 (0,3) ; CL
 (0,10) ; V2
 0.02 ; RUVp
 1 ; RUVa
 (0,1) ; CL-WT
 (0,1) ; CL-SEX
$OMEGA  0.05  ;     iiv CL
 0.2  ;     iiv V2
$SIGMA  1  FIX
$ESTIMATION METHOD=1 INTERACTION MAXEVAL=9999 SIG=3 PRINT=5 NOABORT
            POSTHOC MSFO=msf103
$COVARIANCE PRINT=E
;$SIM (1234) NSUBPROBLEMS=1 ONLYSIM
$TABLE      ID TIME DV MDV EVID IPRED IWRES ONEHEADER NOPRINT
            FILE=sdtab103
$TABLE      ID CL V ONEHEADER NOPRINT FILE=patab103
$TABLE      ID SEX ETN ONEHEADER NOPRINT FILE=catab103
$TABLE      ID WT ONEHEADER NOPRINT FILE=cotab103
$TABLE      ID CL V SEX ETN WT ONEHEADER NOPRINT FILE=mytab103

NM-TRAN MESSAGES
 WARNINGS AND ERRORS (IF ANY) FOR PROBLEM    1
 (WARNING  2) NM-TRAN INFERS THAT THE DATA ARE POPULATION.

1NONLINEAR MIXED EFFECTS MODEL PROGRAM (NONMEM) VERSION 7.2.0
 ORIGINALLY DEVELOPED BY STUART BEAL, LEWIS SHEINER, AND ALISON BOECKMANN
 CURRENT DEVELOPERS ARE ROBERT BAUER, ICON DEVELOPMENT SOLUTIONS,
 AND ALISON BOECKMANN. IMPLEMENTATION, EFFICIENCY, AND STANDARDIZATION
 PERFORMED BY NOUS INFOSYSTEMS.
 PROBLEM NO.:         1
 PK model 1 cmt base
 TOT. NO. OF OBS RECS:      760
 TOT. NO. OF INDIVIDUALS:     40
 ONE COMPARTMENT MODEL WITH FIRST-ORDER ABSORPTION (ADVAN2)
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 #TBLN:      1
 #METH: First Order Conditional Estimation with Interaction
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
 #TERM:
0MINIMIZATION SUCCESSFUL
 NO. OF FUNCTION EVALUATIONS USED:      499
 NO. OF SIG. DIGITS IN FINAL EST.:  3.6
0PARAMETER ESTIMATE IS NEAR ITS BOUNDARY
 THIS MUST BE ADDRESSED BEFORE THE COVARIANCE STEP CAN BE IMPLEMENTED

 ETABAR IS THE ARITHMETIC MEAN OF THE ETA-ESTIMATES,
 AND THE P-VALUE IS GIVEN FOR THE NULL HYPOTHESIS THAT THE TRUE MEAN IS 0.

 ETABAR:        -6.7696E-04 -6.1260E-03
 SE:             1.6234E-02  5.9254E-02

 P VAL.:         9.6674E-01  9.1766E-01

 ETAshrink(%):   3.4902E+01  1.8018E+00
 EPSshrink(%):   3.4527E+00

 #TERE:
 Elapsed estimation time in seconds:    14.87

 ********************               FIRST ORDER CONDITIONAL ESTIMATION WITH INTERACTION              ********************
 #OBJT:**************                       MINIMUM VALUE OF OBJECTIVE FUNCTION                      ********************
 #OBJV:********************************************     2610.102       **************************************************

 ********************               FIRST ORDER CONDITIONAL ESTIMATION WITH INTERACTION              ********************
 ********************                             FINAL PARAMETER ESTIMATE                           ********************

 THETA - VECTOR OF FIXED EFFECTS PARAMETERS   *********
         TH 1      TH 2      TH 3      TH 4      TH 5      TH 6      TH 7
         2.31E+00  6.28E+01  4.63E+02 -8.08E-02  4.14E+00  1.00E-02  5.25E-01

 OMEGA - COV MATRIX FOR RANDOM EFFECTS - ETAS  ********
            ETA1      ETA2
 ETA1
+        2.55E-02
 ETA2
+        0.00E+00  1.49E-01

 SIGMA - COV MATRIX FOR RANDOM EFFECTS - EPSILONS  ****
            EPS1
 EPS1
+        1.00E+00

 OMEGA - CORR MATRIX FOR RANDOM EFFECTS - ETAS  *******
            ETA1      ETA2
 ETA1
+        1.60E-01
 ETA2
+        0.00E+00  3.86E-01

 SIGMA - CORR MATRIX FOR RANDOM EFFECTS - EPSILONS  ***
            EPS1
 EPS1
+        1.00E+00
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