Tue Dec 17 18:10:55 PST 2013
;; 1. Based on: run102
;; 2. Description: PK model 1 cmt base WT-CL allom SEX-CL
;; x1. Author: coen
$PROBLEM    PK model 1 cmt base
$INPUT      ID TIME MDV EVID DV AMT SEX WT ETN
$DATA       acop.csv IGNORE=@
$SUBROUTINE ADVAN2 TRANS2
$PK

ET=1
IF(ETN.EQ.3) ET=1.3
KA = THETA(1)
CL = THETA(2)*((WT/70)**0.75)*( THETA(6)**SEX) * EXP(ETA(1))
V = THETA(3)*EXP(ETA(2))
SC=V

$ERROR

IPRED = F
IRES = DV-IPRED
W = IPRED*THETA(4) + THETA(5)
IF (W.EQ.0) W = 1
IWRES = IRES/W
Y= IPRED+W*ERR(1)

$THETA  (0,2) ; KA
 (0,3) ; CL
 (0,10) ; V2
 0.02 ; RUVp
 1 ; RUVa
 (0,1) ; SEX - CL
$OMEGA  0.05  ;     iiv CL
 0.2  ;     iiv V2
$SIGMA  1  FIX
$ESTIMATION METHOD=1 INTERACTION MAXEVAL=9999 SIG=3 PRINT=5 NOABORT
            POSTHOC MSFO=msf103
$COVARIANCE PRINT=E
;$SIM (1234) NSUBPROBLEMS=1 ONLYSIM
$TABLE      ID TIME DV MDV EVID IPRED IWRES ONEHEADER NOPRINT
            FILE=sdtab105
$TABLE      ID CL V ONEHEADER NOPRINT FILE=patab105
$TABLE      ID SEX ETN ONEHEADER NOPRINT FILE=catab105
$TABLE      ID WT ONEHEADER NOPRINT FILE=cotab105
$TABLE      ID CL V SEX ETN WT ONEHEADER NOPRINT FILE=mytab105

NM-TRAN MESSAGES
 WARNINGS AND ERRORS (IF ANY) FOR PROBLEM    1
 (WARNING  2) NM-TRAN INFERS THAT THE DATA ARE POPULATION.

1NONLINEAR MIXED EFFECTS MODEL PROGRAM (NONMEM) VERSION 7.2.0
 ORIGINALLY DEVELOPED BY STUART BEAL, LEWIS SHEINER, AND ALISON BOECKMANN
 CURRENT DEVELOPERS ARE ROBERT BAUER, ICON DEVELOPMENT SOLUTIONS,
 AND ALISON BOECKMANN. IMPLEMENTATION, EFFICIENCY, AND STANDARDIZATION
 PERFORMED BY NOUS INFOSYSTEMS.
 PROBLEM NO.:         1
 PK model 1 cmt base
 TOT. NO. OF OBS RECS:      760
 TOT. NO. OF INDIVIDUALS:     40
 ONE COMPARTMENT MODEL WITH FIRST-ORDER ABSORPTION (ADVAN2)
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 #TBLN:      1
 #METH: First Order Conditional Estimation with Interaction
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
 #TERM:
0MINIMIZATION SUCCESSFUL
 NO. OF FUNCTION EVALUATIONS USED:      561
 NO. OF SIG. DIGITS IN FINAL EST.:  3.1

 ETABAR IS THE ARITHMETIC MEAN OF THE ETA-ESTIMATES,
 AND THE P-VALUE IS GIVEN FOR THE NULL HYPOTHESIS THAT THE TRUE MEAN IS 0.

 ETABAR:        -7.2700E-04 -5.8538E-03
 SE:             1.3539E-02  5.9325E-02

 P VAL.:         9.5718E-01  9.2140E-01

 ETAshrink(%):   3.8580E+01  1.7571E+00
 EPSshrink(%):   3.3401E+00

 #TERE:
 Elapsed estimation time in seconds:    13.62
 Elapsed covariance time in seconds:     2.00

 ********************               FIRST ORDER CONDITIONAL ESTIMATION WITH INTERACTION              ********************
 #OBJT:**************                       MINIMUM VALUE OF OBJECTIVE FUNCTION                      ********************
 #OBJV:********************************************     2604.002       **************************************************

 ********************               FIRST ORDER CONDITIONAL ESTIMATION WITH INTERACTION              ********************
 ********************                             FINAL PARAMETER ESTIMATE                           ********************

 THETA - VECTOR OF FIXED EFFECTS PARAMETERS   *********
         TH 1      TH 2      TH 3      TH 4      TH 5      TH 6
         2.31E+00  7.81E+01  4.63E+02 -7.97E-02  4.12E+00  5.59E-01

 OMEGA - COV MATRIX FOR RANDOM EFFECTS - ETAS  ********
            ETA1      ETA2
 ETA1
+        1.99E-02
 ETA2
+        0.00E+00  1.50E-01

 SIGMA - COV MATRIX FOR RANDOM EFFECTS - EPSILONS  ****
            EPS1
 EPS1
+        1.00E+00

 OMEGA - CORR MATRIX FOR RANDOM EFFECTS - ETAS  *******
            ETA1      ETA2
 ETA1
+        1.41E-01
 ETA2
+        0.00E+00  3.87E-01

 SIGMA - CORR MATRIX FOR RANDOM EFFECTS - EPSILONS  ***
            EPS1
 EPS1
+        1.00E+00

 ********************               FIRST ORDER CONDITIONAL ESTIMATION WITH INTERACTION              ********************
 ********************                            STANDARD ERROR OF ESTIMATE                          ********************

 THETA - VECTOR OF FIXED EFFECTS PARAMETERS   *********
         TH 1      TH 2      TH 3      TH 4      TH 5      TH 6
         8.71E-02  3.19E+00  2.94E+01  5.52E-02  1.35E+00  4.45E-02

 OMEGA - COV MATRIX FOR RANDOM EFFECTS - ETAS  ********
            ETA1      ETA2
 ETA1
+        1.15E-02
 ETA2
+       .........  2.64E-02

 SIGMA - COV MATRIX FOR RANDOM EFFECTS - EPSILONS  ****
            EPS1
 EPS1
+       .........

 OMEGA - CORR MATRIX FOR RANDOM EFFECTS - ETAS  *******
            ETA1      ETA2
 ETA1
+        4.08E-02
 ETA2
+       .........  3.42E-02

 SIGMA - CORR MATRIX FOR RANDOM EFFECTS - EPSILONS  ***
            EPS1
 EPS1
+       .........

 ********************               FIRST ORDER CONDITIONAL ESTIMATION WITH INTERACTION              ********************
 ********************                          COVARIANCE MATRIX OF ESTIMATE                         ********************

            TH 1      TH 2      TH 3      TH 4      TH 5      TH 6      OM11      OM12      OM22      SG11
 TH 1
+        7.58E-03
 TH 2
+        6.86E-02  1.02E+01
 TH 3
+       -3.42E-01 -4.20E+01  8.67E+02
 TH 4
+       -2.82E-03 -4.29E-02  1.50E-01  3.04E-03
 TH 5
+        6.64E-02  1.08E+00 -5.59E+00 -7.39E-02  1.82E+00
 TH 6
+       -9.50E-04 -9.14E-02  2.28E-01  7.28E-04 -1.90E-02  1.98E-03
 OM11
+       -1.26E-04 -1.43E-02  2.94E-02  1.16E-04 -3.01E-03  2.16E-04  1.33E-04
 OM12
+       ......... ......... ......... ......... ......... ......... ......... .........
 OM22
+        1.70E-04  2.29E-02 -2.61E-02  3.77E-04 -8.97E-03 -3.32E-05  3.58E-05 .........  6.98E-04
 SG11
+       ......... ......... ......... ......... ......... ......... ......... ......... ......... .........

 ********************               FIRST ORDER CONDITIONAL ESTIMATION WITH INTERACTION              ********************
 ********************                          CORRELATION MATRIX OF ESTIMATE                        ********************

            TH 1      TH 2      TH 3      TH 4      TH 5      TH 6      OM11      OM12      OM22      SG11
 TH 1
+        8.71E-02
 TH 2
+        2.47E-01  3.19E+00
 TH 3
+       -1.33E-01 -4.48E-01  2.94E+01
 TH 4
+       -5.87E-01 -2.44E-01  9.24E-02  5.52E-02
 TH 5
+        5.66E-01  2.50E-01 -1.41E-01 -9.93E-01  1.35E+00
 TH 6
+       -2.45E-01 -6.45E-01  1.74E-01  2.97E-01 -3.16E-01  4.45E-02
 OM11
+       -1.25E-01 -3.88E-01  8.65E-02  1.82E-01 -1.94E-01  4.21E-01  1.15E-02
 OM12
+       ......... ......... ......... ......... ......... ......... ......... .........
 OM22
+        7.37E-02  2.72E-01 -3.35E-02  2.59E-01 -2.52E-01 -2.82E-02  1.17E-01 .........  2.64E-02
 SG11
+       ......... ......... ......... ......... ......... ......... ......... ......... ......... .........
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
 ********************               FIRST ORDER CONDITIONAL ESTIMATION WITH INTERACTION              ********************
 ********************                      EIGENVALUES OF COR MATRIX OF ESTIMATE                     ********************

             1         2         3         4         5         6         7         8
         4.13E-03  2.34E-01  4.27E-01  5.69E-01  9.06E-01  1.10E+00  1.69E+00  3.06E+00
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